finish  ! Stops all modules (preprocessor, solution, postprocessor)
/clear	! Start a new analysis, delete the old database (file.db)
/prep7
nblock,3,,782	! Create nodes
(1i9,3e20.9e3)
        1     1.148495905E-02     8.000000000E-02    -9.357487649E-03
        2     1.148495905E-02     6.000000000E-02    -9.357487649E-03
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-1
et,1,186
keyo,1,2,1          ! set full integration on SOLID186
eblock,19,solid,,130	! Create elements
(19i9)
        1        1        1        1        0        0        0        0       20        0        1        1       17       41       45      100       96       90       89
      200      273      358      201      521      507      503      504      203      274      359      372
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-1
csys,0
MP,EX,1,200000,
MP,NUXY,1,0.3,
CMBLOCK,_FRICSUX,NODE,      221
(8i10)
       121       122       123       124       125       126       127       128
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cmsel,s,_FRICSUX
d,all,ux,0
nsel,all
/com,********* Frictionless Supports Y *********
CMBLOCK,_FRICSUY,NODE,      106
(8i10)
       101       102       103       104       105       106       107       108
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cmsel,s,_FRICSUY
d,all,uy,0
nsel,all
CMBLOCK,_FRICSUZ,NODE,      206
(8i10)
       121       122       123       124       125       126       127       128
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cmsel,s,_FRICSUZ
d,all,uz,0
nsel,all
nmod,183,,,,90.,90.,90.
nmod,184,,,,90.,90.,90.
nmod,185,,,,90.,90.,90.
nmod,186,,,,90.,90.,90.
nmod,187,,,,90.,90.,90.
nmod,593,,,,90.,90.,90.
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nmod,707,,,,0.,-90.,0.
local,12,0,0.,0.,0.,0.,0.,0.
csys,0
et,2,154
eblock,10,,,26
(15i9)
      248        2        2        2       12       82       95       83       83      485      488       83      483
      249        2        2        2       12       96       90       89      100      507      503      504      521
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-1
esel,s,type,,2
keyop,2,2,1                ! Apply load in local coordinate system
keyop,2,7,1                ! Use original area so load is constant in large deformation
nsle
sfe,all,1,pres,1,0.
sfe,all,2,pres,1,382.014992048571
sfe,all,3,pres,1,0.
nsel,all
esel,all
!/solu
!antype,0                   ! static analysis
!esel,s,type,,2
!nsle
!sfe,all,1,pres,1,0.
!sfe,all,2,pres,1,382.014992048571
!sfe,all,3,pres,1,0.
!nsel,all
!esel,all
!solve
!/post1
!set, last
!etable,ET_SED,SEND,ELASTIC
!plesol, SEND, ELASTIC
/eof
